**------------------------------------BOF---------------------------------------
**
**------------------------------------------------------------------------------
**
**                             M O D E L  D A T A
**
**------------------------------------------------------------------------------
**
**------------------------------------------------------------------------------
**    MESH
**------------------------------------------------------------------------------
**
*NODE
    100001,  0.0            ,  100.0          ,  0.0
    100002,  1.0            ,  100.0          ,  0.0
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**
*ELEMENT,TYPE=S4,ELSET=Plate
    100001,    100675,    100678,    100680,    100674
    100002,    100674,    100680,    100681,    100673
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**
**------------------------------------------------------------------------------
**    SECTION
**------------------------------------------------------------------------------
**
*SHELL SECTION, ELSET=Plate, MATERIAL=Steel
 1.0
**
**------------------------------------------------------------------------------
**    MATERIAL
**------------------------------------------------------------------------------
**
*MATERIAL, NAME=Steel
*DENSITY
** ro [ton/mm^3]
        7.85e-09
*ELASTIC, TYPE=ISOTROPIC
** E [Mpa], v [-]
 210.0e+03,   0.3
**
**------------------------------------------------------------------------------
**
**                          H I S T O R Y  D A T A
**
**------------------------------------------------------------------------------
**
**------------------------------------------------------------------------------
**    STEP
**------------------------------------------------------------------------------
**
*STEP, NAME=Dload
*STATIC
 0.1, 1.0, , 0.1
**
**------------------------------------------------------------------------------
**    LOAD
**------------------------------------------------------------------------------
**
*DLOAD
 Plate, PNU
**
**------------------------------------------------------------------------------
**    BCs
**------------------------------------------------------------------------------
**
*NSET, NSET=plate-NSET, ELSET=Plate
**
*BOUNDARY, TYPE=DISPLACEMENT
 plate-NSET, 1, 6, 0.0
**
**------------------------------------------------------------------------------
**    OUTPUT
**------------------------------------------------------------------------------
**
** field output
**
*OUTPUT, FIELD, FREQUENCY=1
*NODE OUTPUT
 UT, RF
**
*END STEP
**------------------------------------EOF---------------------------------------
